Tue Oct 13 15:41:54 CEST 2015
$PROBLEM    DES parsing test with transit comp
$INPUT      ID TIME AMT DV EVID
$DATA      data.csv IGNORE=@
$ABBREVIATED DERIV2=NO
$SUBROUTINE ADVAN13 TOL=6
$MODEL      COMP=(TRANS1,DEFDOSE) COMP=(TRANS2) COMP=(TRANS3)
            COMP=(TRANS4) COMP=(TRANS5) COMP=(CENTRAL,DEFOBS)
            COMP=(PERIPH) COMP=(EFFECT)
$PK
 TVCL  = THETA(1)
 CL    = TVCL*EXP(ETA(1))

 TVVC  = THETA(2)
 VC    = TVVC*EXP(ETA(2))

 TVQ  = THETA(3)
 Q    = TVQ*EXP(ETA(3))

 TVVP  = THETA(4)
 VP    = TVVP*EXP(ETA(4))

 TVKA  = THETA(5)
 KA    = TVKA*EXP(ETA(5))

 TVKT  = THETA(6)
 KT    = TVKT*EXP(ETA(6))

 TVEMAX = THETA(7)
 EMAX   = TVEMAX*EXP(ETA(7))

 TVEC50 = THETA(8)
 EC50   = TVEC50*EXP(ETA(8))

 TVKDIS = THETA(9)
 KDIS   = TVKDIS*EXP(ETA(9))

 TVF1   = THETA(10)
 F1     = TVF1*EXP(ETA(10))

$DES
 DADT(1) = -KT*A(1)
 DADT(2) =  KT*A(1) -KT*A(2)
 DADT(3) =  KT*A(2) -KT*A(3)
 DADT(4) =  KT*A(3) -KT*A(4)
 DADT(5) =  KT*A(4) -KA*A(5)
 DADT(6) =  KA*A(5) -(CL/VC)*A(6) -(Q/VC)*A(6) +(Q/VP)*A(7)
 DADT(7) =  (Q/VC)*A(6) -(Q/VP)*A(7)
 DADT(8) =  EMAX*A(6)/(EC50+A(6)) - KDIS*A(8)

$ERROR
 IPRED = A(2)/VC
 IRES  = DV - IPRED
 Y     = IPRED*(1+EPS(1))

$THETA  (0,5) ; CL
 (0,20) ; VC
 (0,1) ; Q
 (0,50) ; VP
 (0,1) ; KA
 (0,3) ; KT
 (0,5) ; EMAX
 (0,3) ; EC50
 (0,1) ; KDIS
 (0,0.5,1) ; F1
$OMEGA  0.1  ;        CL_
 1.5  ;        VC_
 0.4  ;         Q_
 0.05  ;        VP_
 0.4  ;        KA_
 0.4  ;        KT_
 0  FIX  ;      EMAX_
 0  FIX  ;      EC50_
 0  FIX  ;      KDIS_
 0.01  ;        F1_
$SIGMA  0.01  ;      Error
$ESTIMATION METHOD=1 SIGL=6 NSIG=2 INTER MAXEVAL=0 PRINT=1 NOABORT
$COVARIANCE UNCONDITIONAL
$TABLE      ID TIME MDV IPRED CWRES NOPRINT ONEHEADER FILE=sdtab300
$TABLE      ID TIME CL VC VP Q KA KT EMAX EC50 KDIS F1 ETAS(1:10)
            NOPRINT ONEHEADER FILE=patab300

NM-TRAN MESSAGES
 WARNINGS AND ERRORS (IF ANY) FOR PROBLEM    1
 (WARNING  2) NM-TRAN INFERS THAT THE DATA ARE POPULATION.

1NONLINEAR MIXED EFFECTS MODEL PROGRAM (NONMEM) VERSION 7.3.0
 ORIGINALLY DEVELOPED BY STUART BEAL, LEWIS SHEINER, AND ALISON BOECKMANN
 CURRENT DEVELOPERS ARE ROBERT BAUER, ICON DEVELOPMENT SOLUTIONS,
 AND ALISON BOECKMANN. IMPLEMENTATION, EFFICIENCY, AND STANDARDIZATION
 PERFORMED BY NOUS INFOSYSTEMS.
 PROBLEM NO.:         1
 DES parsing test with transit comp
 TOT. NO. OF OBS RECS:        6
 TOT. NO. OF INDIVIDUALS:      1
 GENERAL NONLINEAR KINETICS MODEL USING LSODA (ADVAN13)
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 #TBLN:      1
 #METH: First Order Conditional Estimation with Interaction (Evaluation)
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
0PRED EXIT CODE = 1
0INDIVIDUAL NO.       1   ID= 1.00000000000000E+00   (WITHIN-INDIVIDUAL) DATA REC NO.   2
 THETA=
  5.01E+00   2.00E+01   1.00E+00   5.00E+01   1.00E+00   3.00E+00   5.00E+00   3.00E+00   1.00E+00   5.00E-01
 ETA=
  0.00E+00   1.44E+32   0.00E+00   0.00E+00   0.00E+00   8.19E-02   0.00E+00   0.00E+00   0.00E+00   1.78E-02
 OCCURS DURING SEARCH FOR ETA AT A NONZERO VALUE OF ETA
 ERROR IN LSODA: CODE  -6
0PROGRAM TERMINATED BY OBJ
 Elapsed covariance time in seconds:     5.91
 MESSAGE ISSUED FROM COVARIANCE STEP

 ********************         FIRST ORDER CONDITIONAL ESTIMATION WITH INTERACTION (EVALUATION)       ********************
 #OBJT:**************                       MINIMUM VALUE OF OBJECTIVE FUNCTION                      ********************
 #OBJV:*********************************************************       **************************************************

 ********************         FIRST ORDER CONDITIONAL ESTIMATION WITH INTERACTION (EVALUATION)       ********************
 ********************                             FINAL PARAMETER ESTIMATE                           ********************

 THETA - VECTOR OF FIXED EFFECTS PARAMETERS   *********
         TH 1      TH 2      TH 3      TH 4      TH 5      TH 6      TH 7      TH 8      TH 9      TH10
         5.00E+00  2.00E+01  1.00E+00  5.00E+01  1.00E+00  3.00E+00  5.00E+00  3.00E+00  1.00E+00  5.00E-01

 OMEGA - COV MATRIX FOR RANDOM EFFECTS - ETAS  ********
            ETA1      ETA2      ETA3      ETA4      ETA5      ETA6      ETA7      ETA8      ETA9      ET10
 ETA1
+        1.00E-01
 ETA2
+        0.00E+00  1.50E+00
 ETA3
+        0.00E+00  0.00E+00  4.00E-01
 ETA4
+        0.00E+00  0.00E+00  0.00E+00  5.00E-02
 ETA5
+        0.00E+00  0.00E+00  0.00E+00  0.00E+00  4.00E-01
 ETA6
+        0.00E+00  0.00E+00  0.00E+00  0.00E+00  0.00E+00  4.00E-01
 ETA7
+        0.00E+00  0.00E+00  0.00E+00  0.00E+00  0.00E+00  0.00E+00  0.00E+00
 ETA8
+        0.00E+00  0.00E+00  0.00E+00  0.00E+00  0.00E+00  0.00E+00  0.00E+00  0.00E+00
 ETA9
+        0.00E+00  0.00E+00  0.00E+00  0.00E+00  0.00E+00  0.00E+00  0.00E+00  0.00E+00  0.00E+00
 ET10
+        0.00E+00  0.00E+00  0.00E+00  0.00E+00  0.00E+00  0.00E+00  0.00E+00  0.00E+00  0.00E+00  1.00E-02

 SIGMA - COV MATRIX FOR RANDOM EFFECTS - EPSILONS  ****
            EPS1
 EPS1
+        1.00E-02

 OMEGA - CORR MATRIX FOR RANDOM EFFECTS - ETAS  *******
            ETA1      ETA2      ETA3      ETA4      ETA5      ETA6      ETA7      ETA8      ETA9      ET10
 ETA1
+        3.16E-01
 ETA2
+        0.00E+00  1.22E+00
 ETA3
+        0.00E+00  0.00E+00  6.32E-01
 ETA4
+        0.00E+00  0.00E+00  0.00E+00  2.24E-01
 ETA5
+        0.00E+00  0.00E+00  0.00E+00  0.00E+00  6.32E-01
 ETA6
+        0.00E+00  0.00E+00  0.00E+00  0.00E+00  0.00E+00  6.32E-01
 ETA7
+        0.00E+00  0.00E+00  0.00E+00  0.00E+00  0.00E+00  0.00E+00  0.00E+00
 ETA8
+        0.00E+00  0.00E+00  0.00E+00  0.00E+00  0.00E+00  0.00E+00  0.00E+00  0.00E+00
 ETA9
+        0.00E+00  0.00E+00  0.00E+00  0.00E+00  0.00E+00  0.00E+00  0.00E+00  0.00E+00  0.00E+00
 ET10
+        0.00E+00  0.00E+00  0.00E+00  0.00E+00  0.00E+00  0.00E+00  0.00E+00  0.00E+00  0.00E+00  1.00E-01

 SIGMA - CORR MATRIX FOR RANDOM EFFECTS - EPSILONS  ***
            EPS1
 EPS1
+        1.00E-01
 #CPUT: Total CPU Time in Seconds,        6.109
